!--- OpenDSS Linecodes file generated from Show LINECONSTANTS command
!--- Frequency = 60 Hz, Earth resistivity = 100 ohm-m
!--- Earth Model = Deri

New Linecode.795-explicit nphases=6  Units=mi
~ Rmatrix=[0.298597  |0.172704  0.304227  |0.169315  0.172015  0.301223  |0.167768  0.170404  0.172323  0.301223  |0.162021  0.164432  0.170404  0.172015  0.304227  |0.159675  0.162021  0.167768  0.169315  0.172704  0.298597  ]
~ Xmatrix=[0.95787  |0.50761  0.941008  |0.305655  0.322465  0.939193  |0.286462  0.298998  0.497529  0.939193  |0.23185  0.235757  0.298998  0.322465  0.941008  |0.228864  0.23185  0.286462  0.305655  0.50761  0.95787  ]
~ Cmatrix=[18.0338  |-7.63799  18.624  |-1.27788  -1.86462  18.635  |-0.893628  -1.18717  -7.3818  18.635  |-0.453268  -0.511194  -1.18717  -1.86462  18.624  |-0.420976  -0.453268  -0.893628  -1.27788  -7.63799  18.0338  ]

New Linecode.795-equiv nphases=3  Units=mi
~ Rmatrix=[0.240683  |0.169912  0.240065  |0.162104  0.169912  0.240683  ]
~ Xmatrix=[0.72794  |0.302197  0.718641  |0.231416  0.302197  0.72794  ]
~ Cmatrix=[21.3535  |-5.16854  22.4202  |-1.82272  -5.16854  21.3535  ]
